// SBML level 2 version 4

model neu_model()

  // Compartments:
  compartment cyt = 1 pl;

  // Species:
  species CDK2 in cyt = init_x1;  // substance in nM
  species CDK4 in cyt = init_x2;  // substance in nM
  species CDKN1A in cyt = init_x3;  // substance in nM
  species PCNA in cyt = init_x4;  // substance in nM
  species RB1 in cyt = init_x5;  // substance in nM
  species TP53 in cyt = init_x6;  // substance in nM

  // Parameters:
  a_1_5 = 91.72999;
  a_6_3 = 155.8327;
  b_1_1 = 3.216262;
  b_1_3 = 165.0508;
  b_2_3 = 165.3549;
  b_2_5 = 0.5368802;
  b_3_1 = 1.26551;
  b_3_2 = 7.897712;
  b_3_4 = 5.812551;
  b_3_5 = 0.1709377;
  b_4_1 = 5.938299e-11;
  b_6_2 = 11.97012;
  delta_1 = 0.9871102;
  h_1 = 342.5072;
  h_2 = 1.000071;
  h_3 = 158.7756;
  h_4 = 1;
  h_5 = 52.81104;
  init_x1 = 0.1653782;
  init_x2 = 0.4803122;
  init_x3 = 0.1572756;
  init_x4 = 0.2887851;
  init_x5 = 0.2890174;
  init_x6 = 0.2168083;

  // Assignment rules:
  u1 := piecewise(0, time < 0, 1);

  // Reactions:
  reaction1: => CDK2; cyt*(-CDK2 - (exp(h_1*((b_1_1*CDK2 + b_3_1*CDKN1A + b_4_1*PCNA)*(b_1_1 + b_3_1 + b_4_1 + 1)/((b_1_1 + b_3_1 + b_4_1)*(b_1_1*CDK2 + b_3_1*CDKN1A + b_4_1*PCNA + 1)) - 0.5)) - exp(0.5*h_1))/((exp(h_1*((b_1_1*CDK2 + b_3_1*CDKN1A + b_4_1*PCNA)*(b_1_1 + b_3_1 + b_4_1 + 1)/((b_1_1 + b_3_1 + b_4_1)*(b_1_1*CDK2 + b_3_1*CDKN1A + b_4_1*PCNA + 1)) - 0.5)) + 1)*(exp(0.5*h_1) - 1)));  // modifiers: CDKN1A, PCNA
  reaction2: => CDK4; cyt*((exp(0.5*h_2) - exp(h_2*((b_3_2*CDKN1A + b_6_2*TP53)*(b_3_2 + b_6_2 + 1)/((b_3_2 + b_6_2)*(b_3_2*CDKN1A + b_6_2*TP53 + 1)) - 0.5)))/((exp(h_2*((b_3_2*CDKN1A + b_6_2*TP53)*(b_3_2 + b_6_2 + 1)/((b_3_2 + b_6_2)*(b_3_2*CDKN1A + b_6_2*TP53 + 1)) - 0.5)) + 1)*(exp(0.5*h_2) - 1)) - CDK4);  // modifiers: CDKN1A, TP53
  reaction3: => CDKN1A; cyt*((exp(0.5*h_3) - exp(h_3*(TP53*((b_1_3*CDK2 + b_2_3*CDK4)*(b_1_3 + b_2_3 + 1)/((b_1_3 + b_2_3)*(b_1_3*CDK2 + b_2_3*CDK4 + 1)) - 1)*(a_6_3 + 1)/(a_6_3*TP53 + 1) + 0.5)))/((exp(h_3*(TP53*((b_1_3*CDK2 + b_2_3*CDK4)*(b_1_3 + b_2_3 + 1)/((b_1_3 + b_2_3)*(b_1_3*CDK2 + b_2_3*CDK4 + 1)) - 1)*(a_6_3 + 1)/(a_6_3*TP53 + 1) + 0.5)) + 1)*(exp(0.5*h_3) - 1)) - CDKN1A - delta_1*u1*(CDKN1A - 1));  // modifiers: CDK2, CDK4, TP53
  reaction4: => PCNA; cyt*(-PCNA - (exp(h_4*(CDKN1A*(b_3_4 + 1)/(b_3_4*CDKN1A + 1) - 0.5)) - exp(0.5*h_4))/((exp(h_4*(CDKN1A*(b_3_4 + 1)/(b_3_4*CDKN1A + 1) - 0.5)) + 1)*(exp(0.5*h_4) - 1)));  // modifiers: CDKN1A
  reaction5: => RB1; cyt*((exp(0.5*h_5) - exp(h_5*(CDK2*((b_2_5*CDK4 + b_3_5*CDKN1A)*(b_2_5 + b_3_5 + 1)/((b_2_5 + b_3_5)*(b_2_5*CDK4 + b_3_5*CDKN1A + 1)) - 1)*(a_1_5 + 1)/(a_1_5*CDK2 + 1) + 0.5)))/((exp(h_5*(CDK2*((b_2_5*CDK4 + b_3_5*CDKN1A)*(b_2_5 + b_3_5 + 1)/((b_2_5 + b_3_5)*(b_2_5*CDK4 + b_3_5*CDKN1A + 1)) - 1)*(a_1_5 + 1)/(a_1_5*CDK2 + 1) + 0.5)) + 1)*(exp(0.5*h_5) - 1)) - RB1);  // modifiers: CDK2, CDK4, CDKN1A
  reaction6: => TP53; cyt*(-TP53);

  // Unit definitions:
  unit time = 60 second;
  unit nM = 1e-9 mole;
  unit pl = 1e-12 litre;
end
